# -------------------- Description --------------------
# The purpose is to simulate a charged super-capacitor using EChemDID and ReaxFF.
# This simulation is just a test, thus there are only 8 ions in each solvant boxes.
# A minimization is issued, then a relaxation and finally the main simulation.


# -------------------- Defining some parameters --------------------
units   	real
timestep 	0.1
atom_style 	charge
neighbor 	2.0 bin
neigh_modify 	every 2 delay 10 check yes
variable 	init_T equal 1.0
variable 	target_T equal 300.0
variable 	target_P equal 1.0


# -------------------- Adding the structure --------------------
# The types are in ordre of appearance H O Na C
read_data 	data.big_ch-sc


# -------------------- Creating the groups --------------------
variable 	lower_carbons atom "type == 4 && z <= lz / 2."
variable 	upper_carbons atom "type == 4 && z > lz / 2."

group   	carbons type == 4
group   	negative variable lower_carbons
group   	positive variable upper_carbons


# -------------------- Defining the interactions --------------------
pair_style 	reax/c NULL safezone 2.0 mincap 200 minhbonds 100
pair_coeff 	* * ffield.reax.big_ch-sc H O Na C
fix     	QEq all qeq/shielded  1 10.0 1.0e-6 1000 reax/c


# -------------------- Initializing some properties --------------------
fix     	property all property/atom d_locpot d_lap
compute 	property all property/atom d_locpot d_lap


log     	data/log.minimize
# -------------------- Minimizing the energy and the forces --------------------
thermo  	10
thermo_style	custom step pe press vol density

minimize 	1.0e-05 1.0e-06 100 1000


log         	data/log.relaxation
# -------------------- Running a relaxation --------------------
velocity    	all create ${init_T} 98715

dump        	relaxation_positions all custom 1000 data/relaxation.lammpstrj id element x y z q
dump_modify 	relaxation_positions element H O Na C pbc yes
thermo      	1000
thermo_style 	custom step temp pe ke press vol density

fix         	relaxation_ensemble all npt temp ${init_T} ${target_T} $(100.0*dt) aniso ${target_P} ${target_P} $(1000.0*dt)

run         	100000

unfix       	relaxation_ensemble
fix 	    	relaxation_ensemble all npt temp $(temp) ${target_T} $(100.0*dt) aniso $(press) ${target_P} $(1000.0*dt)

run         	100000

undump      	relaxation_positions
unfix       	relaxation_ensemble


log         	data/log.big_ch-sc
# -------------------- Running the main simulation --------------------
set         	group carbons d_locpot 0.0
dump        	positions all custom 1000 data/big_ch-sc.lammpstrj id element x y z xu yu zu q
dump_modify 	positions element H O Na C pbc yes
thermo      	1000
thermo_style 	custom step temp pe ke press

fix         	potential carbons echemdid 1 k 6.0 rc 4.0 norm 2.0 nelec 10 negative positive volt 4.0
			# k: effective diffusivity
			# rc: critical sepration distance below which two atoms are considered as part of the same metallic cluster
			# norm: normalization factor (if 0 the code will compute the norm for you) !! IT DON'T !!
			# nelec: number of electronic steps between ionic steps
fix         	ensemble all nvt temp ${target_T} ${target_T} $(100.0*dt)

run         	10000000
