# -------------------- Description --------------------
# The purpose is to simulate a charged super-capacitor using EChemDID and ReaxFF.
# This simulation is just a test, thus there are only 8 ions in each solvant boxes.
# A minimization is issued, then a relaxation and finally the main simulation.


# -------------------- Defining some parameters --------------------
units       	real
atom_style  	charge
timestep    	0.1
variable    	init_T equal 1.0
variable    	target_T equal 300.0
variable    	target_P equal 1.0


# -------------------- Adding the structure --------------------
# The types are in ordre of appearance H O Na C
read_data   	data.test


# -------------------- Defining the box properties --------------------
boundary    	p p f
variable    	wall_zlo equal zlo
variable    	wall_zhi equal zhi


# -------------------- Creating the groups --------------------
variable    	lower_carbons atom "type == 4 && z <= lz / 2."
variable    	upper_carbons atom "type == 4 && z > lz / 2."

group       	carbons type == 4
group       	negative variable lower_carbons
group       	positive variable upper_carbons


# -------------------- Defining the interactions --------------------
pair_style  	reax/c NULL safezone 2.0 mincap 200 minhbonds 100
pair_coeff  	* * ffield.reax.test H O Na C
fix         	Qeq all qeq/shielded  1 10.0 1.0e-6 1000 reax/c


# -------------------- Initializing some properties --------------------
fix         	property all property/atom d_locpot d_lap
compute     	property all property/atom d_locpot d_lap

set         	group all d_locpot 0.0


log         	data/log.minimize
# -------------------- Minimizing the energy and the forces --------------------
thermo      	100
thermo_style 	custom step pe press

minimize    	1.0e-05 1.0e-06 100 1000


log         	data/log.relaxation
# -------------------- Running a relaxation --------------------
velocity    	all create ${init_T} 98715

dump        	relaxation_positions all custom 1000 data/relaxation.lammpstrj id element x y z
dump_modify 	relaxation_positions element H O Na C pbc yes
thermo      	1000
thermo_style 	custom step temp pe ke press vol density

fix         	walls carbons wall/reflect zlo v_wall_zlo zhi v_wall_zhi
fix         	relaxation_ensemble all npt temp ${init_T} ${target_T} $(100.0*dt) aniso $(press) ${target_P} $(1000.0*dt)

run         	100000

unfix       	relaxation_ensemble
fix 	    	relaxation_ensemble all npt temp $(temp) ${target_T} $(100.0*dt) aniso $(press) ${target_P} $(1000.0*dt)

run         	100000

undump      	relaxation_positions
unfix       	walls
unfix       	relaxation_ensemble


log         	data/log.ch-sc
# -------------------- Running the main simulation --------------------
dump        	positions all custom 1000 data/ch-sc.lammpstrj id element x y z xu yu zu q
dump_modify 	positions element H O Na C pbc yes
thermo      	1000
thermo_style 	custom step temp pe ke press

fix         	walls carbons wall/reflect zlo EDGE zhi EDGE
fix         	potential carbons echemdid 1 k 6.0 rc 2.0 norm 0.73 nelec 10 negative positive volt 4.0
			# k: effective diffusivity
			# rc: critical sepration distance below which two atoms are considered as part of the same metallic cluster
			# norm: normalization factor (if 0 the code will compute the norm for you) !! IT DON'T !!
			# nelec: number of electronic steps between ionic steps
fix         	ensemble all nvt temp ${target_T} ${target_T} $(100.0*dt)

run         	10000000
